<?xml version="1.0"?>

<?xml-stylesheet type="text/xsl" href="http://jsbsim.sourceforge.net/JSBSim.xsl"?>
<fdm_config>

 <fileheader>

  <author>Kochar</author>


  <filecreationdate></filecreationdate>
  <version></version>

  <description>JSBSim model of Airship</description>
</fileheader>


 <!--
 ==== Metrics ===============================================================
 -->

 <metrics>

  <wingarea unit="M2">  215.641 </wingarea>
  <wingspan unit="M">    16.5699 </wingspan>
  <chord    unit="M">    16.5699 </chord>
  <htailarea unit="M2">   0.0   </htailarea>
  <htailarm  unit="M">    0.0   </htailarm>
  <vtailarea unit="M2">   0.0   </vtailarea>
  <vtailarm  unit="M">    0.0   </vtailarm>


<location name="AERORP"   unit="M"><x>0.0</x><y>0.0</y><z>0</z></location>
<location name="EYEPOINT" unit="M"><x>0.0</x><y>0.0</y><z>0.0</z></location>
<location name="VRP"      unit="M"><x>0.0</x><y>0.0</y><z>0.0</z></location>

 </metrics>


 <mass_balance>

  <emptywt unit="KG"> 877.7039 </emptywt>

  <ixx unit="KG*M2">  30832.2320 </ixx>
  <iyy unit="KG*M2">  30832.2321 </iyy>
  <izz unit="KG*M2">  15244.1704 </izz>
  <ixy unit="KG*M2">  -0.000000 </ixy>
  <ixz unit="KG*M2">  -0.000000 </ixz>
  <iyz unit="KG*M2">  0.000000 </iyz>
  <location name="CG" unit="M">
   <x> -0.0 </x><y> 0.0 </y><z> -7.9 </z>
  </location>


  <pointmass name="Ballast_Center">
   <location unit="M">
    <x>  0 </x>
    <y>   0.0 </y>
    <z> 0 </z>
   </location>
   <weight unit="KG"> 20000 </weight>
  </pointmass>


 </mass_balance>

 <ground_reactions>


  <contact type="BOGEY" name="CAR_GEAR">
   <location unit="M">
    <x>  0.00 </x>
    <y>   0.00 </y>
    <z> -10.35 </z>
   </location>
   <static_friction>  0.8 </static_friction>
   <dynamic_friction> 0.5 </dynamic_friction>
   <rolling_friction> 0.2 </rolling_friction>
   <spring_coeff unit="N/M"> 50000  </spring_coeff>
   <damping_coeff unit="N/M/SEC"> 10000 </damping_coeff>
   <max_steer unit="DEG"> 360.0 </max_steer>
   <brake_group> LEFT </brake_group>
   <retractable>0</retractable>
  </contact>

    <contact type="BOGEY" name="CAR_GEAR">
   <location unit="M">
    <x>  0.00 </x>
    <y>   -10.00 </y>
    <z> -10.35 </z>
   </location>
   <static_friction>  0.8 </static_friction>
   <dynamic_friction> 0.5 </dynamic_friction>
   <rolling_friction> 0.2 </rolling_friction>
   <spring_coeff unit="N/M"> 50000  </spring_coeff>
   <damping_coeff unit="N/M/SEC"> 10000 </damping_coeff>
   <max_steer unit="DEG"> 360.0 </max_steer>
   <brake_group> LEFT </brake_group>
   <retractable>0</retractable>
  </contact>

    <contact type="BOGEY" name="CAR_GEAR">
   <location unit="M">
    <x>  0.00 </x>
    <y>   10.00 </y>
    <z> -10.35 </z>
   </location>
   <static_friction>  0.8 </static_friction>
   <dynamic_friction> 0.5 </dynamic_friction>
   <rolling_friction> 0.2 </rolling_friction>
   <spring_coeff unit="N/M"> 50000  </spring_coeff>
   <damping_coeff unit="N/M/SEC"> 10000 </damping_coeff>
   <max_steer unit="DEG"> 360.0 </max_steer>
   <brake_group> LEFT </brake_group>
   <retractable>0</retractable>
  </contact>

    <contact type="BOGEY" name="CAR_GEAR">
   <location unit="M">
    <x>  10.00 </x>
    <y>   0.00 </y>
    <z> -10.35 </z>
   </location>
   <static_friction>  0.8 </static_friction>
   <dynamic_friction> 0.5 </dynamic_friction>
   <rolling_friction> 0.2 </rolling_friction>
   <spring_coeff unit="N/M"> 50000  </spring_coeff>
   <damping_coeff unit="N/M/SEC"> 10000 </damping_coeff>
   <max_steer unit="DEG"> 360.0 </max_steer>
   <brake_group> LEFT </brake_group>
   <retractable>0</retractable>
  </contact>

      <contact type="BOGEY" name="CAR_GEAR">
   <location unit="M">
    <x>  -10.00 </x>
    <y>   0.00 </y>
    <z> -10.35 </z>
   </location>
   <static_friction>  0.8 </static_friction>
   <dynamic_friction> 0.5 </dynamic_friction>
   <rolling_friction> 0.2 </rolling_friction>
   <spring_coeff unit="N/M"> 50000  </spring_coeff>
   <damping_coeff unit="N/M/SEC"> 10000 </damping_coeff>
   <max_steer unit="DEG"> 360.0 </max_steer>
   <brake_group> LEFT </brake_group>
   <retractable>0</retractable>
  </contact>


 </ground_reactions>

 <ground_reactions>


  <contact type="BOGEY" name="CAR_GEAR">
   <location unit="M">
    <x>  0.00 </x>
    <y>   0.00 </y>
    <z> -10.35 </z>
   </location>
   <static_friction>  0.8 </static_friction>
   <dynamic_friction> 0.5 </dynamic_friction>
   <rolling_friction> 0.2 </rolling_friction>
   <spring_coeff unit="N/M"> 50000 </spring_coeff>
   <damping_coeff unit="N/M/SEC"> 10000 </damping_coeff>
   <max_steer unit="DEG"> 360.0 </max_steer>
   <brake_group> LEFT </brake_group>
   <retractable>0</retractable>
  </contact>


 </ground_reactions>


  <propulsion>

  <!-- [0] Horizontal PORT  — fwd/bwd + yaw differential -->
  <engine file="eng_electricH">
   <location unit="M"><x>0.0</x><y>-9.3</y><z>0.0</z></location>
   <orient  unit="DEG"><roll>0.0</roll><pitch>0.0</pitch><yaw>0.0</yaw></orient>
   <feed>0</feed>
   <thruster file="prop_airshipH">
    <location unit="M"><x>0.0</x><y>-9.3</y><z>0.0</z></location>
    <orient  unit="DEG"><roll>0.0</roll><pitch>0.0</pitch><yaw>0.0</yaw></orient>
   </thruster>
  </engine>

  <!-- [1] Horizontal STARBOARD — fwd/bwd + yaw differential -->
  <engine file="eng_electricH">
   <location unit="M"><x>0.0</x><y>9.3</y><z>0.0</z></location>
   <orient  unit="DEG"><roll>0.0</roll><pitch>0.0</pitch><yaw>0.0</yaw></orient>
   <feed>0</feed>
   <thruster file="prop_airshipH">
    <location unit="M"><x>0.0</x><y>9.3</y><z>0.0</z></location>
    <orient  unit="DEG"><roll>0.0</roll><pitch>0.0</pitch><yaw>0.0</yaw></orient>
   </thruster>
  </engine>

 <!-- [2] Vertical FORE -->
<engine file="eng_electricV">
 <location unit="M"><x> 7.175</x><y> 0.000</y><z>-4.1</z></location>
 <orient  unit="DEG"><roll>0.0</roll><pitch>90.0</pitch><yaw>0.0</yaw></orient>
 <feed>0</feed>
 <thruster file="prop_airshipV">
  <sense> 1 </sense>
  <location unit="M"><x> 7.175</x><y> 0.000</y><z>-4.1</z></location>
  <orient  unit="DEG"><roll>0.0</roll><pitch>90.0</pitch><yaw>0.0</yaw></orient>
 </thruster>
</engine>

<!-- [3] Vertical AFT -->
<engine file="eng_electricV">
 <location unit="M"><x>-7.175</x><y> 0.000</y><z>-4.1</z></location>
 <orient  unit="DEG"><roll>0.0</roll><pitch>90.0</pitch><yaw>0.0</yaw></orient>
 <feed>0</feed>
 <thruster file="prop_airshipV">
  <sense> 1 </sense>
  <location unit="M"><x>-7.175</x><y> 0.000</y><z>-4.1</z></location>
  <orient  unit="DEG"><roll>0.0</roll><pitch>90.0</pitch><yaw>0.0</yaw></orient>
 </thruster>
</engine>

<!-- [4] Vertical PORT -->
<engine file="eng_electricV">
 <location unit="M"><x> 0.000</x><y>-7.175</y><z>-4.1</z></location>
 <orient  unit="DEG"><roll>0.0</roll><pitch>90.0</pitch><yaw>0.0</yaw></orient>
 <feed>0</feed>
 <thruster file="prop_airshipV">
  <sense>-1 </sense>
  <location unit="M"><x> 0.000</x><y>-7.175</y><z>-4.1</z></location>
  <orient  unit="DEG"><roll>0.0</roll><pitch>90.0</pitch><yaw>0.0</yaw></orient>
 </thruster>
</engine>

<!-- [5] Vertical STARBOARD -->
<engine file="eng_electricV">
 <location unit="M"><x> 0.000</x><y> 7.175</y><z>-4.1</z></location>
 <orient  unit="DEG"><roll>0.0</roll><pitch>90.0</pitch><yaw>0.0</yaw></orient>
 <feed>0</feed>
 <thruster file="prop_airshipV">
  <sense>-1 </sense>
  <location unit="M"><x> 0.000</x><y> 7.175</y><z>-4.1</z></location>
  <orient  unit="DEG"><roll>0.0</roll><pitch>90.0</pitch><yaw>0.0</yaw></orient>
 </thruster>
</engine>

<!-- [6] Horizontal PORT REVERSE -->
<engine file="eng_electricH">
 <location unit="M"><x>0.0</x><y>-9.3</y><z>0.0</z></location>
 <orient  unit="DEG"><roll>0.0</roll><pitch>0.0</pitch><yaw>180.0</yaw></orient>
 <feed>0</feed>
 <thruster file="prop_airshipH">
  <location unit="M"><x>0.0</x><y>-9.3</y><z>0.0</z></location>
  <orient  unit="DEG"><roll>0.0</roll><pitch>0.0</pitch><yaw>180.0</yaw></orient>
 </thruster>
</engine>

<!-- [7] Horizontal STARBOARD REVERSE -->
<engine file="eng_electricH">
 <location unit="M"><x>0.0</x><y>9.3</y><z>0.0</z></location>
 <orient  unit="DEG"><roll>0.0</roll><pitch>0.0</pitch><yaw>180.0</yaw></orient>
 <feed>0</feed>
 <thruster file="prop_airshipH">
  <location unit="M"><x>0.0</x><y>9.3</y><z>0.0</z></location>
  <orient  unit="DEG"><roll>0.0</roll><pitch>0.0</pitch><yaw>180.0</yaw></orient>
 </thruster>
</engine>

<!-- [8] Vertical FORE REVERSE (pitch -90 → thrust downward) -->
<engine file="eng_electricV">
 <location unit="M"><x> 7.175</x><y> 0.000</y><z>-4.1</z></location>
 <orient  unit="DEG"><roll>0.0</roll><pitch>-90.0</pitch><yaw>0.0</yaw></orient>
 <feed>0</feed>
 <thruster file="prop_airshipV">
  <sense> 1 </sense>
  <location unit="M"><x> 7.175</x><y> 0.000</y><z>-4.1</z></location>
  <orient  unit="DEG"><roll>0.0</roll><pitch>-90.0</pitch><yaw>0.0</yaw></orient>
 </thruster>
</engine>

<!-- [9] Vertical AFT REVERSE -->
<engine file="eng_electricV">
 <location unit="M"><x>-7.175</x><y> 0.000</y><z>-4.1</z></location>
 <orient  unit="DEG"><roll>0.0</roll><pitch>-90.0</pitch><yaw>0.0</yaw></orient>
 <feed>0</feed>
 <thruster file="prop_airshipV">
  <sense> 1 </sense>
  <location unit="M"><x>-7.175</x><y> 0.000</y><z>-4.1</z></location>
  <orient  unit="DEG"><roll>0.0</roll><pitch>-90.0</pitch><yaw>0.0</yaw></orient>
 </thruster>
</engine>

<!-- [10] Vertical PORT REVERSE -->
<engine file="eng_electricV">
 <location unit="M"><x> 0.000</x><y>-7.175</y><z>-4.1</z></location>
 <orient  unit="DEG"><roll>0.0</roll><pitch>-90.0</pitch><yaw>0.0</yaw></orient>
 <feed>0</feed>
 <thruster file="prop_airshipV">
  <sense>-1 </sense>
  <location unit="M"><x> 0.000</x><y>-7.175</y><z>-4.1</z></location>
  <orient  unit="DEG"><roll>0.0</roll><pitch>-90.0</pitch><yaw>0.0</yaw></orient>
 </thruster>
</engine>

<!-- [11] Vertical STARBOARD REVERSE -->
<engine file="eng_electricV">
 <location unit="M"><x> 0.000</x><y> 7.175</y><z>-4.1</z></location>
 <orient  unit="DEG"><roll>0.0</roll><pitch>-90.0</pitch><yaw>0.0</yaw></orient>
 <feed>0</feed>
 <thruster file="prop_airshipV">
  <sense>-1 </sense>
  <location unit="M"><x> 0.000</x><y> 7.175</y><z>-4.1</z></location>
  <orient  unit="DEG"><roll>0.0</roll><pitch>-90.0</pitch><yaw>0.0</yaw></orient>
 </thruster>
</engine>

 </propulsion>


 <buoyant_forces>


<property value="0.0">ballonets/in-flow-ft3ps[0]</property>

<gas_cell type="HELIUM">
 <location unit="M">
  <x> 0.0 </x>
  <y> 0.0 </y>
  <z> 0.0 </z>
 </location>
 <x_radius unit="M"> 8.273 </x_radius>
 <y_radius unit="M"> 8.273 </y_radius>
 <z_radius unit="M"> 8.273 </z_radius>
 <max_overpressure unit="PA"> 39500.0 </max_overpressure>
 <valve_coefficient unit="M4*SEC/KG"> 0.5  </valve_coefficient>
 <fullness> 1 </fullness>


 <ballonet type="AIR">
  <location unit="M">
   <x> 0.0 </x>
   <y> 0.0 </y>
   <z> -6.927 </z>
  </location>
  <x_radius unit="M"> 1.358 </x_radius>
  <y_radius unit="M"> 1.358 </y_radius>
  <z_radius unit="M"> 1.358 </z_radius>
  <max_overpressure unit="PA"> 39500.0 </max_overpressure>
  <valve_coefficient unit="M4*SEC/KG"> 0.01 </valve_coefficient>
  <fullness> 1.0 </fullness>

  <blower_input>
   <function name="buoyant_forces/gas-cell/ballonet[0]/in-flow-ft3ps">
    <property>ballonets/in-flow-ft3ps[0]</property>
   </function>
  </blower_input>
 </ballonet>

</gas_cell>

</buoyant_forces>


<system name="Weigh_Off">
 <channel name="Initial_Static_Weigh_Off">

  <summer name="static-condition/net-lift-lbs">
    <input> buoyant_forces/gas-cell[0]/buoyancy-lbs </input>
    <input> -inertia/weight-lbs </input>
  </summer>

 </channel>
</system>


 <system file="instrumentation-jsbsim"/> <!-- Instruments and sensors. -->

 <flight_control name="Thrust_Vectoring_Controls">

 <property value="0.0">fcs/vertical-thrust-cmd-norm</property>

 <property value="0.0">fcs/engine0-cmd-norm</property>
<property value="0.0">fcs/engine1-cmd-norm</property>

<channel name="Forward">

 <!-- Forward engines: active when cmd > 0 -->
 <fcs_function name="fcs/engine0-throttle-cmd">
  <function>
   <max>
    <property>fcs/engine0-cmd-norm</property>
    <value>0.0</value>
   </max>
  </function>
  <clipto><min>0</min><max>1</max></clipto>
  <output>fcs/throttle-pos-norm[0]</output>
 </fcs_function>

 <fcs_function name="fcs/engine1-throttle-cmd">
  <function>
   <max>
    <property>fcs/engine1-cmd-norm</property>
    <value>0.0</value>
   </max>
  </function>
  <clipto><min>0</min><max>1</max></clipto>
  <output>fcs/throttle-pos-norm[1]</output>
 </fcs_function>

 <!-- Reverse engines: active when cmd < 0 -->
 <fcs_function name="fcs/engine6-throttle-cmd">
  <function>
   <max>
    <product>
     <value>-1.0</value>
     <property>fcs/engine0-cmd-norm</property>
    </product>
    <value>0.0</value>
   </max>
  </function>
  <clipto><min>0</min><max>1</max></clipto>
  <output>fcs/throttle-pos-norm[6]</output>
 </fcs_function>

 <fcs_function name="fcs/engine7-throttle-cmd">
  <function>
   <max>
    <product>
     <value>-1.0</value>
     <property>fcs/engine1-cmd-norm</property>
    </product>
    <value>0.0</value>
   </max>
  </function>
  <clipto><min>0</min><max>1</max></clipto>
  <output>fcs/throttle-pos-norm[7]</output>
 </fcs_function>

</channel>

<channel name="Vertical">

 <!-- Downward thrust (cmd > 0): engines 2-5 at pitch 90 -->
 <fcs_function name="fcs/engine2-throttle-cmd">
  <function>
   <max>
    <property>fcs/vertical-thrust-cmd-norm</property>
    <value>0.0</value>
   </max>
  </function>
  <clipto><min>0</min><max>1</max></clipto>
  <output>fcs/throttle-pos-norm[2]</output>
 </fcs_function>

 <fcs_function name="fcs/engine3-throttle-cmd">
  <function>
   <max>
    <property>fcs/vertical-thrust-cmd-norm</property>
    <value>0.0</value>
   </max>
  </function>
  <clipto><min>0</min><max>1</max></clipto>
  <output>fcs/throttle-pos-norm[3]</output>
 </fcs_function>

 <fcs_function name="fcs/engine4-throttle-cmd">
  <function>
   <max>
    <property>fcs/vertical-thrust-cmd-norm</property>
    <value>0.0</value>
   </max>
  </function>
  <clipto><min>0</min><max>1</max></clipto>
  <output>fcs/throttle-pos-norm[4]</output>
 </fcs_function>

 <fcs_function name="fcs/engine5-throttle-cmd">
  <function>
   <max>
    <property>fcs/vertical-thrust-cmd-norm</property>
    <value>0.0</value>
   </max>
  </function>
  <clipto><min>0</min><max>1</max></clipto>
  <output>fcs/throttle-pos-norm[5]</output>
 </fcs_function>

 <!-- Upward thrust (cmd < 0): engines 8-11 at pitch -90 -->
 <fcs_function name="fcs/engine8-throttle-cmd">
  <function>
   <max>
    <product>
     <value>-1.0</value>
     <property>fcs/vertical-thrust-cmd-norm</property>
    </product>
    <value>0.0</value>
   </max>
  </function>
  <clipto><min>0</min><max>1</max></clipto>
  <output>fcs/throttle-pos-norm[8]</output>
 </fcs_function>

 <fcs_function name="fcs/engine9-throttle-cmd">
  <function>
   <max>
    <product>
     <value>-1.0</value>
     <property>fcs/vertical-thrust-cmd-norm</property>
    </product>
    <value>0.0</value>
   </max>
  </function>
  <clipto><min>0</min><max>1</max></clipto>
  <output>fcs/throttle-pos-norm[9]</output>
 </fcs_function>

 <fcs_function name="fcs/engine10-throttle-cmd">
  <function>
   <max>
    <product>
     <value>-1.0</value>
     <property>fcs/vertical-thrust-cmd-norm</property>
    </product>
    <value>0.0</value>
   </max>
  </function>
  <clipto><min>0</min><max>1</max></clipto>
  <output>fcs/throttle-pos-norm[10]</output>
 </fcs_function>

 <fcs_function name="fcs/engine11-throttle-cmd">
  <function>
   <max>
    <product>
     <value>-1.0</value>
     <property>fcs/vertical-thrust-cmd-norm</property>
    </product>
    <value>0.0</value>
   </max>
  </function>
  <clipto><min>0</min><max>1</max></clipto>
  <output>fcs/throttle-pos-norm[11]</output>
 </fcs_function>

</channel>


</flight_control>

 <external_reactions>


 <!-- Translational added-mass forces — at body-frame origin -->
 <force name="added-mass-bx" frame="BODY">
  <location unit="M"><x>0.0</x><y>0.0</y><z>0.0</z></location>
  <direction><x>1.0</x><y>0.0</y><z>0.0</z></direction>
 </force>
 <force name="added-mass-by" frame="BODY">
  <location unit="M"><x>0.0</x><y>0.0</y><z>0.0</z></location>
  <direction><x>0.0</x><y>1.0</y><z>0.0</z></direction>
 </force>
 <force name="added-mass-bz" frame="BODY">
  <location unit="M"><x>0.0</x><y>0.0</y><z>0.0</z></location>
  <direction><x>0.0</x><y>0.0</y><z>1.0</z></direction>
 </force>

 <!-- Pitch rotational added-mass force pair — ±1 ft in z -->
 <force name="added-mass-pitch[0]" frame="BODY">
  <location unit="M"><x>0.0</x><y>0.0</y><z>-0.3048</z></location>
  <direction><x>1.0</x><y>0.0</y><z>0.0</z></direction>
 </force>
 <force name="added-mass-pitch[1]" frame="BODY">
  <location unit="M"><x>0.0</x><y>0.0</y><z>0.3048</z></location>
  <direction><x>1.0</x><y>0.0</y><z>0.0</z></direction>
 </force>

 <!-- Yaw rotational added-mass force pair — ±1 ft in y -->
 <force name="added-mass-yaw[0]" frame="BODY">
  <location unit="M"><x>0.0</x><y>-0.3048</y><z>0.0</z></location>
  <direction><x>1.0</x><y>0.0</y><z>0.0</z></direction>
 </force>
 <force name="added-mass-yaw[1]" frame="BODY">
  <location unit="M"><x>0.0</x><y>0.3048</y><z>0.0</z></location>
  <direction><x>1.0</x><y>0.0</y><z>0.0</z></direction>
 </force>

</external_reactions>

 <system name="constants">

  <!-- Aerodynamic constants. -->
 <property value="54.3633">   aero/constants/length-ft           </property>
 <property value="54.3633">   aero/constants/diameter-ft         </property>
 <property value="2955.37">   aero/constants/length-diameter-ft2 </property>
 <property value="83753.3207"> aero/constants/volume-ft3          </property>
 <property value="370.1298"> aero/constants/ballonet-vol-ft3    </property>


 <!-- Added mass constants — sphere theory -->
 <property value="0.50"> aero/constants/added-mass/k-axial      </property>  <!-- k_a sphere = 0.5 -->
 <property value="0.50"> aero/constants/added-mass/k-traverse   </property>  <!-- k_b sphere = 0.5 -->
 <property value="0.69"> aero/constants/added-mass/k-rotational </property>


</system>

 <aerodynamics file="Systems/datcom_aero"/>

</fdm_config>
