<?xml version="1.0"?>

<propeller name="prop_Airship">

  <ixx unit="KG*M2">    12.0 </ixx>          <!-- heavy wide-chord blades -->
  <diameter unit="IN">  88.0 </diameter>
  <numblades>           3    </numblades>
  <gearratio>           1.0  </gearratio>

  <ct_factor>           1.0  </ct_factor>
  <cp_factor>           1.0  </cp_factor>

<table name="C_THRUST" type="internal">
  <tableData>
0.0  0.85
0.1  0.80
0.2  0.73
0.3  0.62
0.4  0.49
0.5  0.33
0.6  0.16
0.7  0.03
  </tableData>
</table>

<table name="C_POWER" type="internal">
  <tableData>
0.0  0.42
0.1  0.40
0.2  0.36
0.3  0.30
0.4  0.22
0.5  0.14
0.6  0.06
0.7  0.01
  </tableData>
</table>

</propeller>
