<?xml version="1.0"?>
<electric_engine name="Airship_Motor">
  <power unit="HP">        100.0 </power>
  <minvolts>      10.0 </minvolts>
  <maxvolts>      48.0 </maxvolts>
  <efficiency>     0.90 </efficiency>
  <idlerpm>         0.0 </idlerpm>
  <maxrpm>       7200.0 </maxrpm>
  <maxthrottle>    1.0 </maxthrottle>
  <minthrottle>   -1.0 </minthrottle>
</electric_engine>
