<?xml version="1.0"?>
<electric_engine name="Airship_Motor">
  <power unit="HP">        300.0 </power>      <!-- ← main change: was 100, try 200-500 -->
  <minvolts>      10.0 </minvolts>
  <maxvolts>      48.0 </maxvolts>
  <efficiency>     0.95 </efficiency>           <!-- ← slight bump, max realistic ~0.95 -->
  <idlerpm>         0.0 </idlerpm>
  <maxrpm>       7200.0 </maxrpm>              <!-- ← lower RPM for large airship props -->
  <maxthrottle>    1.0 </maxthrottle>
  <minthrottle>   -1.0 </minthrottle>
</electric_engine>
