<?xml version="1.0"?>

<propeller name="prop_Airship">

  <ixx unit="KG*M2">    5.0  </ixx>
  <diameter unit="IN">  78.7 </diameter>
  <numblades>           3    </numblades>
  <gearratio>           1.0  </gearratio>

  <ct_factor>           1.0  </ct_factor>
  <cp_factor>           1.0  </cp_factor>

<table name="C_THRUST" type="internal">
  <tableData>
  0.05	0.161419443
  0.0694915254	0.17037433
  0.127966102	0.164349761
  0.186440678	0.161384653
  0.244915254	0.157289129
  0.303389831	0.1519179
  0.361864407	0.144450196
  0.420338983	0.135580069
  0.478813559	0.12569749
  0.537288136	0.114853184
  0.595762712	0.103452152
  0.654237288	0.0916353698
  0.712711864	0.0793983045
  0.771186441	0.0666965471
  0.829661017	0.0538327591
  0.888135593	0.0404134364
  0.946610169	0.026826062
  1.00508475	0.0126557091
  1.06355932	0
  1.1220339	0
  1.18050847	0
  1.2	0
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  </tableData>
</table>

<table name="C_POWER" type="internal">
  <tableData>
  0.05	0.0754164492
  0.0694915254	0.0831665832
  0.127966102	0.0995805573
  0.186440678	0.100992557
  0.244915254	0.101763149
  0.303389831	0.101481863
  0.361864407	0.10074445
  0.420338983	0.0990814505
  0.478813559	0.0963908599
  0.537288136	0.0925754932
  0.595762712	0.0877635766
  0.654237288	0.08194972
  0.712711864	0.0750606958
  0.771186441	0.0671635722
  0.829661017	0.058087915
  0.888135593	0.0479197851
  0.946610169	0.0363881265
  1.00508475	0.0237330374
  1.06355932	0.00954904559
  1.1220339	0
  1.18050847	0
  1.2	0
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  </tableData>
</table>

</propeller>
